DAU := 27*10^6
MAU := 400*10^6
activity_coef := 0.4
# Расчет RPS
# Пользователи
all_users := MAU/activity_coef = 1000000000
RPS_user_create := all_users/((2025 - 2009)*365 day) = 1.98186 1/s
RPS_user_read := DAU/day = 312.5 1/s
RPS_user := RPS_user_create + RPS_user_read = 314.482 1/s
user_rate_create := RPS_user_create = 1.98186 1/s
user_rate_read := RPS_user_read = 312.5 1/s
# Вопросы
questions_per_day_read_by_user := 3
RPS_question_create := 7000/day = 0.0810185 1/s
RPS_question_read := DAU*questions_per_day_read_by_user/day = 937.5 1/s
RPS_question := RPS_question_create + RPS_question_read = 937.581 1/s
question_rate_create := RPS_question_create = 0.0810185 1/s
question_rate_read := RPS_question_read = 937.5 1/s
# Ответы
answer_per_question := 5
RPS_answer_create := RPS_question_create*answer_per_question = 0.405093 1/s
answer_rate_create := RPS_answer_create = 0.405093 1/s
answer_rate_read := answer_per_question*RPS_question_read = 4687.5 1/s
RPS_answer_read := answer_rate_read/answer_per_question = 937.5 1/s
RPS_answer := RPS_answer_create + RPS_answer_read = 937.905 1/s
# Посты
posts_batch := 7
posts_read_per_day_by_user := 14
RPS_post_create := RPS_question_create = 0.0810185 1/s
post_rate_create := RPS_post_create = 0.0810185 1/s
post_rate_read := DAU*posts_read_per_day_by_user/day = 4375 1/s
RPS_post_read := post_rate_read/posts_batch = 625 1/s
post_rate := post_rate_read + RPS_post_create = 4375.08 1/s
RPS_post := RPS_post_create + RPS_post_read = 625.081 1/s
# Комментарии
comments_per_post_feed := 62
comments_per_post_profile := 1.07
comments_per_answer := 17.4
comments_on_read := 5
comments_batch := 5
RPS_comment_create := comments_per_post_feed*RPS_post_create + comments_per_answer*RPS_answer_create = 12.0718 1/s
RPS_comment_read := RPS_post_read + RPS_answer_read = 1562.5 1/s
comment_rate_create := RPS_comment_create = 12.0718 1/s
comment_rate_read := comments_on_read*RPS_post_read + comments_on_read*RPS_answer_read = 7812.5 1/s
comment_rate := comment_rate_read + RPS_comment_create = 7824.57 1/s
RPS_comment := RPS_comment_create + RPS_comment_read = 1574.57 1/s
# Оценки
votes_per_post_feed := 1137
votes_per_post_profile := 17.9
votes_per_answer := 83.7
RPS_post_votes_create := votes_per_post_feed*RPS_post_create = 92.1181 1/s
RPS_answer_votes_create := votes_per_answer*RPS_answer_create = 33.9062 1/s
RPS_votes_create := RPS_post_votes_create + RPS_answer_votes_create = 126.024 1/s
RPS_post_votes_read := RPS_post_read = 625 1/s
RPS_answer_votes_read := RPS_answer_read = 937.5 1/s
RPS_votes_read := RPS_post_votes_read + RPS_answer_votes_read = 1562.5 1/s
post_votes_rate_create := RPS_post_votes_create = 92.1181 1/s
answer_votes_rate_create := RPS_answer_votes_create = 33.9062 1/s
votes_rate_read := post_rate_read + answer_rate_read = 9062.5 1/s
votes_rate_create := post_votes_rate_create + answer_votes_rate_create = 126.024 1/s
votes_request := votes_rate_read + RPS_votes_create = 9188.52 1/s
RPS_votes := RPS_votes_create + RPS_votes_read = 1688.52 1/s
# Сообщества
spaces_per_user := 0.001
all_spaces := spaces_per_user*all_users = 1000000
RPS_space_create := RPS_user_create*spaces_per_user = 0.00198186 1/s
RPS_space_read := RPS_post_read = 625 1/s
space_rate_create := RPS_space_create = 0.00198186 1/s
space_rate_read := post_rate_read = 4375 1/s
RPS_space := RPS_space_create + RPS_space_read = 625.002 1/s
# Файлы:
answer_images := 0.6
post_images := 1.8
RPS_file_create := user_rate_create + answer_rate_create*answer_images + post_rate_create*post_images + space_rate_create = 2.37273 1/s
RPS_file_read := user_rate_read + answer_rate_read*answer_images + post_rate_read*post_images + space_rate_read = 15375 1/s
RPS_file := RPS_file_create + RPS_file_read = 15377.4 1/s
# Суммарный
RPS := RPS_user + RPS_question + RPS_answer + RPS_post + RPS_comment + RPS_votes + RPS_space = 6703.15 1/s
# Расчет трафика
bit := 1
B := 8 bit
Kbit := 1024 bit
KB := 1024 B
Mbit := 1024 Kbit
MB := 1024 KB
GB := 1024 MB
Gbit := 1024 Mbit
TB := 1024 GB
PB := 1024 TB
symbol_size := 4 B
image_size := 500 KB
# Пользователи
username_symbols := 30
user_bio_symbols := 255
user_size := (username_symbols + user_bio_symbols)*symbol_size = 1.11328 KB
user_traffic_create := user_size*user_rate_create = 17.651 Kbit/s
user_traffic_read := user_size*user_rate_read = 2.71797 Mbit/s
user_traffic := user_traffic_create + user_traffic_read = 2.73521 Mbit/s
user_traffic = 28.8479 GB/day
2*user_traffic = 5.47042 Mbit/s
# Вопросы
question_symbols := 120
question_size := question_symbols*symbol_size = 480 B
question_traffic_create := question_size*question_rate_create = 38.8889 B/s
question_traffic_read := question_size*question_rate_read = 439.453 KB/s
question_traffic := question_traffic_create + question_traffic_read = 439.491 KB/s
question_traffic = 3.43352 Mbit/s
question_traffic = 36.213 GB/day
2*question_traffic = 6.86705 Mbit/s
# Ответы
answer_symbols := 918
answer_images := 0.6
answer_size := answer_symbols*symbol_size = 3.58594 KB
answer_traffic_create := answer_size*answer_rate_create = 1.45264 KB/s
answer_traffic_read := answer_size*answer_rate_read = 16.4151 MB/s
answer_traffic := answer_traffic_create + answer_traffic_read = 16.4165 MB/s
answer_traffic = 131.332 Mbit/s
answer_traffic = 1.35268 TB/day
2*answer_traffic = 262.665 Mbit/s
# Посты
post_symbols := 968
post_images := 1.8
post_size := post_symbols*symbol_size = 3.78125 KB
post_traffic_create := post_size*post_rate_create = 313.704 B/s
post_traffic_read := post_size*post_rate_read = 16.1552 MB/s
post_traffic := post_traffic_create + post_traffic_read = 16.1555 MB/s
post_traffic = 129.244 Mbit/s
post_traffic = 1.33118 TB/day
2*post_traffic = 258.489 Mbit/s
# Оценки
vote_size_create := 512 B
vote_size_read := 20 B
vote_traffic_create := vote_size_create*votes_rate_create = 63.0122 KB/s
vote_traffic_read := vote_size_read*votes_rate_read = 177.002 KB/s
vote_traffic := vote_traffic_create + vote_traffic_read = 240.014 KB/s
vote_traffic = 1.87511 Mbit/s
vote_traffic = 19.7766 GB/day
2*vote_traffic = 3.75022 Mbit/s
# Комментарии
comment_symbols := 87
comment_size := symbol_size*comment_symbols = 348 B
comment_traffic_create := comment_size*comment_rate_create = 4.10251 KB/s
comment_traffic_read := comment_size*comment_rate_read = 2.5928 MB/s
comment_traffic := comment_traffic_create + comment_traffic_read = 2.59681 MB/s
comment_traffic = 20.7745 Mbit/s
comment_traffic = 219.106 GB/day
2*comment_traffic = 41.5489 Mbit/s
# Сообщества
space_name_length := 30
space_decription_length := 60
space_size := symbol_size*(space_name_length + space_decription_length) = 360 B
space_traffic_create := space_size*space_rate_create = 0.71347 B/s
space_traffic_read := space_size*space_rate_read = 1.50204 MB/s
space_traffic := space_traffic_create + space_traffic_read = 12.0163 Mbit/s
space_traffic = 126.734 GB/day
2*space_traffic = 24.0326 Mbit/s
# Файлы
file_traffic_create := (user_rate_create + answer_rate_create*answer_images + post_rate_create*post_images + space_rate_create)*image_size = 9.26849 Mbit/s
file_traffic_read := (user_rate_read + answer_rate_read*answer_images + post_rate_read*post_images + space_rate_read)*image_size = 58.651 Gbit/s
file_traffic := file_traffic_create + file_traffic_read = 58.66 Gbit/s
file_traffic = 618.68 TB/day
2*file_traffic = 117.32 Gbit/s
# Суммарный
traffic := user_traffic + question_traffic + answer_traffic + post_traffic + vote_traffic + comment_traffic + space_traffic + file_traffic = 58.9544 Gbit/s
traffic = 621.784 TB/day
peak_traffic := 2*traffic = 117.909 Gbit/s
# Расчет хранилищ
DB_grow_time := 10*365 day
# Пользователи
user_DB_grow := user_traffic_create = 66.3567 GB/(365 day)
user_DB_size := user_DB_grow*DB_grow_time = 663.567 GB
# Вопросы
question_DB_grow := question_traffic_create = 1.14217 GB/(365 day)
question_DB_size := question_DB_grow*DB_grow_time = 11.4217 GB
# Ответы
answer_DB_grow := answer_traffic_create = 43.6882 GB/(365 day)
answer_DB_size := answer_DB_grow*DB_grow_time = 436.882 GB
# Посты
post_DB_grow := post_traffic_create = 9.21354 GB/(365 day)
post_DB_size := post_DB_grow*DB_grow_time = 92.1354 GB
# Комментарии
comment_DB_grow := comment_traffic_create = 123.383 GB/(365 day)
comment_DB_size := comment_DB_grow*DB_grow_time = 1.20492 TB
# Оценки
int_size := 4 B
vote_size_DB := int_size*4 = 16 B
vote_DB_grow := vote_size_DB*RPS_votes_create = 59.2217 GB/(365 day)
vote_DB_size := vote_DB_grow*DB_grow_time = 592.217 GB
# Сообщества
space_DB_grow := space_traffic_create = 21.4577 MB/(365*day)
space_DB_size := all_spaces*space_size = 1.1448 TB  # disabled
space_DB_size := space_DB_grow*DB_grow_time = 214.577 MB
space_DB_grow := space_DB_size/DB_grow_time = 117.228 GB/(365*day)  # disabled
# Файлы
file_DB_grow := file_traffic_create = 34.8438 TB/(365*day)
file_DB_size := file_DB_grow*DB_grow_time = 348.438 TB
# Суммарно
DB_grow := user_DB_grow + question_DB_grow + answer_DB_grow + post_DB_grow + comment_DB_grow + vote_DB_grow + space_DB_grow + file_DB_grow = 35.1397 TB/(365 day)
DB_size := DB_grow*DB_grow_time = 351.397 TB
# Балансировка нагрузки
USA := 0.37
India := 0.25
Europe := 0.176
SEA := 0.06  # - Юго-восточная Азия
UnitedKingdom := 0.056
MENA := 0.05  # - Ближний Восток и Северная Африка
Canada := 0.037
ANZ := 0.027  # - Австралия
Japan := 0.017
Mexico := 0.0087
Brazil := 0.0065
# Доля пользователей по частям света
Северная_Америка := USA + Canada + Mexico = 0.4157
Азия := India + SEA + MENA + Japan = 0.377
Еврора := Europe + UnitedKingdom = 0.232
Австралия := ANZ = 0.027
Южная_Америка := Brazil = 0.0065
# Количесво ДЦ:
data_centers := 5
# RPS по ДЦ:
RPS_Северная_Америка := RPS*Северная_Америка/2 = 1393.25 1/s
RPS_Европа := RPS*Еврора = 1555.13 1/s
RPS_Азия := RPS*(Азия + Австралия + Южная_Америка)/2 = 1375.82 1/s
# Трафик по ДЦ:
traffic_Северная_Америка := traffic*Северная_Америка/2 = 12.2537 Gbit/s
peak_traffic_Северная_Америка := peak_traffic*Северная_Америка/2 = 24.5073 Gbit/s
traffic_Европа := traffic*Еврора = 13.6774 Gbit/s
peak_traffic_Европа := peak_traffic*Еврора = 27.3548 Gbit/s
traffic_Азия := traffic*(Азия + Австралия + Южная_Америка)/2 = 12.1004 Gbit/s
peak_traffic_Азия := peak_traffic*(Азия + Австралия + Южная_Америка)/2 = 24.2008 Gbit/s
# Трафик на 1 ДЦ:
traffic_per_DC := peak_traffic/data_centers = 23.5817 Gbit/s
RPS_per_DC := RPS/data_centers = 1340.63 1/s
# Трафик на балансировщик:
balancers := 1
traffic_per_balancer := traffic_per_DC/balancers = 23.5817 Gbit/s
RPS_per_balancer := RPS_per_DC/balancers = 1340.63 1/s
SSL_size := 1 KB
SSL_traffic := SSL_size*RPS_per_balancer = 10.4737 Mbit/s
SSL_time := 50 ms = 0.05 s
cores := SSL_time*RPS_per_balancer = 67.0315
# Размер хранилища новый расчет
# Размер типов данных
int_size := 4 B
float_size := 4 B
timestamp := 8 B
varchar_255_size := 256 B
enum_size := 4 B
Question_text_size := question_size = 480 B
Answer_text_size := answer_symbols*symbol_size = 3.58594 KB
Post_text_size := post_symbols*symbol_size = 3.78125 KB
Comment_text_size := symbol_size*comment_symbols = 348 B
# User:
User_row_size := int_size + varchar_255_size*4 + timestamp*2 = 1044 B
User_rows := all_users = 1000000000
User_size := User_row_size*User_rows = 972.301 GB
# Question:
Question_row_size := int_size*2 + Question_text_size + timestamp*2 = 504 B
Question_rows := question_rate_create*DB_grow_time = 25550000
Question_size := Question_row_size*Question_rows = 11.9928 GB
# Answer:
Answer_row_size := int_size*3 + Answer_text_size + timestamp*2 = 3700 B
Answer_rows := answer_rate_create*DB_grow_time = 127750000
Answer_size := Answer_row_size*Answer_rows = 440.213 GB
# Post:
Post_row_size := int_size*2 + Post_text_size + timestamp*2 = 3896 B
Post_rows := post_rate_create*DB_grow_time = 25550000
Post_size := Post_row_size*Post_rows = 92.7065 GB
# Comment:
Comment_row_size := int_size*3 + Comment_text_size + timestamp*2 = 376 B
Comment_rows := comment_rate_create*DB_grow_time = 3.80695e9
Comment_size := Comment_row_size*Comment_rows = 1.30186 TB
# PostVote:
PostVote_row_size := int_size*4 = 16 B
PostVote_rows := post_votes_rate_create*DB_grow_time = 29050350000
PostVote_size := PostVote_row_size*PostVote_rows = 432.884 GB
# AnswerVote:
AnswerVote_row_size := int_size*4 = 16 B
AnswerVote_rows := answer_votes_rate_create*DB_grow_time = 10692675000
AnswerVote_size := AnswerVote_row_size*AnswerVote_rows = 159.333 GB
# Space:
Space_row_size := int_size + varchar_255_size*2 + timestamp*2 = 532 B
Space_rows := all_spaces = 1000000
Space_size := Space_row_size*Space_rows = 507.355 MB
# File:
File_row_size := int_size*3 + varchar_255_size*2 + image_size + timestamp*2 = 500.527 KB
File_rows := User_rows + Answer_rows*answer_images + Post_rows*post_images + Space_rows = 1123640000
File_size := File_row_size*File_rows = 523.787 TB
# UserActivity:
UserActivity_row_size := int_size*2 + enum_size = 12 B
UserActivity_rows := (Question_rows + Post_rows)*1000 = 51100000000
UserActivity_size := UserActivity_row_size*UserActivity_rows = 571.087 GB
# UserInterest:
UserInterest_row_size := int_size*2 + float_size = 12 B
UserInterest_rows := User_rows*5 = 5000000000
UserInterest_size := UserInterest_row_size*UserInterest_rows = 55.8794 GB
# Topic:
Topic_row_size := int_size + varchar_255_size = 260 B
Topic_rows := 300000
Topic_size := Topic_row_size*Topic_rows = 74.3866 MB
# Нагрузка на хранилище
# User:
User_create := RPS_user_create = 1.98186 1/s
User_read := RPS_user_read = 312.5 1/s
# Question:
Question_create := RPS_question_create = 0.0810185 1/s
Question_read := RPS_question_read = 937.5 1/s
# Answer:
Answer_create := RPS_answer_create = 0.405093 1/s
Answer_read := RPS_answer_read = 937.5 1/s
# Post:
Post_create := RPS_post_create = 0.0810185 1/s
Post_read := RPS_post_read = 625 1/s
# Comment:
Comment_create := RPS_comment_create = 12.0718 1/s
Comment_read := RPS_comment_read = 1562.5 1/s
# PostVote:
PostVote_create := RPS_post_votes_create = 92.1181 1/s
PostVote_read := RPS_post_votes_read = 625 1/s
# AnswerVote:
AnswerVote_create := RPS_answer_votes_create = 33.9062 1/s
AnswerVote_read := RPS_answer_votes_read = 937.5 1/s
# Space:
Space_create := RPS_space_create = 0.00198186 1/s
Space_read := RPS_space_read = 625 1/s
# File:
File_create := User_create + Answer_create*answer_images + Post_create*post_images + Space_create = 2.37273 1/s
File_read := User_read + Answer_read*answer_images + Post_read*post_images + Space_read = 2625 1/s
# UserActivity:
UserActivity_read := DAU/(1 day) = 312.5 1/s
# UserInterest:
UserInterest_read := DAU/(15*min) = 30000 1/s
# 11. Расчет ресурсов
# RPS:
Nginx_RPS := RPS = 6703.15 1/s
Nginx_RPS_peak := Nginx_RPS*2 = 13406.3 1/s
# MainService:
MainService_RPS := RPS_user + RPS_question + RPS_answer + RPS_post + RPS_space = 3440.05 1/s
MainService_RPS_peak := MainService_RPS*2 = 6880.1 1/s
# VoteService:
VoteService_RPS := RPS_comment + RPS_votes = 3263.1 1/s
VoteService_RPS_peak := VoteService_RPS*2 = 6526.19 1/s
# RecomendationService:
RecomendationService_RPS := (RPS_question + RPS_post)*s/(15*min) + DAU/day = 314.236 1/s
RecomendationService_RPS_peak := RecomendationService_RPS*2 = 628.473 1/s
# Трафик:
Nginx_traffic := traffic = 58.9544 Gbit/s
MainService_traffic := user_traffic + question_traffic + answer_traffic + post_traffic + space_traffic + file_traffic = 58.9322 Gbit/s
VoteService_traffic := vote_traffic + comment_traffic = 22.6496 Mbit/s
Recomendation_traffic := RecomendationService_RPS*100 B = 245.497 Kbit/s
light_logic_RPS := 5000/s
light_logic_RAM := 10 MB
medium_logic_RPS := 100/s
medium_logic_RAM := 100 MB
heavy_logic_RPS := 10/s
heavy_logic_RAM := 100 MB
# Count:
MainService_count_calculated := MainService_RPS_peak/heavy_logic_RPS = 688.01
VoteService_count_calculated := VoteService_RPS_peak/medium_logic_RPS = 65.2619
RecomendationService_count_calculated := RecomendationService_RPS_peak/heavy_logic_RPS = 62.8473
MainService_count := 690
VoteService_count := 70
RecomendationService_count := 65
# CPU:
MainService_CPU_calculated := MainService_count_calculated = 688.01
VoteService_CPU_calculated := VoteService_count_calculated = 65.2619
RecomendationService_CPU_calculated := RecomendationService_count_calculated = 62.8473
MainService_CPU := MainService_count = 690
VoteService_CPU := VoteService_count = 70
RecomendationService_CPU := RecomendationService_count = 65
# RAM:
MainService_RAM_calculated := MainService_CPU_calculated*heavy_logic_RAM = 67.1885 GB
VoteService_RAM_calculated := VoteService_CPU_calculated*medium_logic_RAM = 6526.19 MB
RecomendationService_RAM_calculated := RecomendationService_CPU_calculated*heavy_logic_RAM = 6284.73 MB
MainService_RAM := MainService_CPU*heavy_logic_RAM = 67.3828 GB
VoteService_RAM := VoteService_CPU*medium_logic_RAM = 7000 MB
RecomendationService_RAM := RecomendationService_CPU*heavy_logic_RAM = 6.34766 GB
# Хранилища:
# Размер:
PostgreSQL_size := User_size + Question_size + Answer_size + Post_size + Comment_size + PostVote_size + AnswerVote_size + Space_size + UserInterest_size + Topic_size = 3.41698 TB
ClickHouse_size := UserActivity_size = 571.087 GB
Redis_size := 100 B*DAU = 2.51457 GB
S3_size := File_size = 523.787 TB
# RPS:
PostgreSQL_RPS := RPS = 6703.15 1/s
PostgreSQL_RPS_peak := PostgreSQL_RPS*2 = 13406.3 1/s
ClickHouse_RPS := RPS_question + RPS_post = 1562.66 1/s
ClickHouse_RPS_peak := ClickHouse_RPS*2 = 3125.32 1/s
Redis_RPS := RPS_question + RPS_post = 1562.66 1/s
Redis_RPS_peak := Redis_RPS*2 = 3125.32 1/s
S3_size_RPS := RPS_file = 15377.4 1/s
# CPU:
DB_RPS_per_CPU := 100/s
PostgreSQL_CPU_calculated := PostgreSQL_RPS_peak/DB_RPS_per_CPU = 134.063
PostgreSQL_CPU := 135
ClickHouse_CPU_calculated := ClickHouse_RPS_peak/DB_RPS_per_CPU = 31.2532
ClickHouse_CPU := 35
Redis_CPU_calculated := Redis_RPS_peak/DB_RPS_per_CPU = 31.2532
Redis_CPU := 35
